// SBML level 2 version 4

model Cancer()

  // Compartments:
  compartment default = 1 volume;
  compartment Cell in default = 1 volume;

  // Species:
  species KRAS in Cell = 0.5;
  species EGFR in Cell = 0.5;
  species PI3K in Cell = 0.5;
  species TGFb in Cell = 0.5;
  species MAPK in Cell = 0.5;
  species BRAF_Raf in Cell = 0.5; BRAF_Raf is "BRAF/Raf";
  species MEK in Cell = 0.5;
  species ERK in Cell = 0.5;
  species FOS in Cell = 0.5;
  species JUN in Cell = 0.5;
  species JNK in Cell = 0.5;
  species TAK1 in Cell = 0.5;

  // Reactions:
  re2: EGFR => KRAS; EGFR*re2_k1;
    re2_k1 = 1 substance;
  re3: KRAS => PI3K; KRAS*re3_k1;
    re3_k1 = 1 substance;
  re4: KRAS => JNK; KRAS*re4_k1;
    re4_k1 = 1 substance;
  re5: KRAS => BRAF_Raf; KRAS*re5_k1;  // modifiers: MAPK
    re5_k1 = 1 substance;
  re6: BRAF_Raf => MEK; BRAF_Raf*re6_k1;
    re6_k1 = 1 substance;
  re7: MEK => ERK; MEK*re7_k1;
    re7_k1 = 1 substance;
  re8: ERK => FOS; ERK*re8_k1;
    re8_k1 = 1 substance;
  re11: TGFb => TAK1; TGFb*re11_k1;
    re11_k1 = 1 substance;
  re12: TAK1 => JNK; TAK1*re12_k1;
    re12_k1 = 1 substance;
  re13: JNK => JUN; JNK*re13_k1;
    re13_k1 = 1 substance;

  // Unit definitions:
  unit substance = mole;
  unit volume = litre;
  unit area = metre^2;
  unit length = metre;
  unit time = second;
end
